// COMSOL Multiphysics 6.1.0.346 model "poisson_pde.mph"
// Outline of the model tree

Geometry
  geom1 "Geometry 1" (3D, length unit m)
    blk1: Block | size = {10, 1, 1}
    fin: Finalize "Form Union"

Physics
  g: GeneralFormPDE on all domains
    dependent variable u
    EquationForm.form = Automatic
    gfeq1: GeneralFormPDE (default) | f = 10; Ga = {ux, uy, uz}; da = 0
    zflx1: ZeroFluxBoundary "Zero Flux 1" (default)
    init1: init "Initial Values 1" (default)
    dir1: DirichletBoundary "Dirichlet Boundary Condition 1" on boundaries 1-6 | r = 0

Mesh
  mesh1 "Mesh 1" (physics-controlled)
    size: MeshSizeDefault | hauto = 4

Studies
  std1 "Study 1"
    stat: Stationary

Solver configurations
  sol1 "Solution 1" (study std1)
    v1: Variables "Dependent Variables 1"
    s1: Stationary "Stationary Solver 1"
      dDef: Direct
      fc1: FullyCoupled | linsolver = dDef

Datasets
  dset1: Solution | solution = sol1

Plots
  pg1: PlotGroup3D "General Form PDE" | data = dset1
    slc1: Slice | expr = u