// COMSOL Multiphysics 6.1.0.346 model "fuel_cell_cluster_sweep.mph"
// Outline of the model tree

Parameters
  T = 80[degC]  // Temperature
  perm = 1e-13[m^2]  // permeability
  eps_elec = 0.3  // electrolyte volume fraction
  eps_gas = 0.4  // gas phase volume fraction
  E_cell = 1[V]
  sigma_elec = 5[S/m]  // electrolyte conductivity
  sigma_electrode = 164[S/m]  // electode conductivity
  i0_anode = 1e4[A/m^2]  // i0 for anode in B-V equation
  i0_cathode = 1e-3[A/m^2]  // i0 for cathode in b_v equation
  AV = 1e9[1/m]  // specific area
  x_H2O_in = 0.42111  // inlet water molar fraction
  x_N2_in = 0.45732  // inlet nitrogen molar fraction

Probes
  bnd1: Boundary "Boundary Probe 1" on boundaries 3 | expr = -fc.nIs; unit = A/cm^2; table = tbl1

Geometry
  geom1 "Geometry 1" (3D, length unit m)
    blk1: Block "anode" | pos = {0, 0, -0.075/1000}; size = {1.5/1000, 1.5/1000, 0.075/1000}
    blk2: Block "electrolyte" | size = {1.5/1000, 1.5/1000, 0.075/1000}
    blk3: Block "cathode" | pos = {0, 0, 0.075/1000}; size = {1.5/1000, 1.5/1000, 0.075/1000}
    wp1: WorkPlane (disabled) | quickz = 0.15/1000; unite = on
      c1: Circle | pos = {1.5/1000, 1.5/1000}; rot = 180; r = 1/1000; angle = 90
    fin: Finalize "Form Union"

Physics
  fc: HydrogenFuelCell on all domains
    dependent variable electricpotentialionicphase
    H2GasMixture.H2O = 1
    H2GasMixture.GasPhaseDiffusion = 0
    O2GasMixture.H2O = 1
    O2GasMixture.N2 = 1
    O2GasMixture.GasPhaseDiffusion = 0
    DefaultElectrodeReactionSettings.ElectrolyteType = ProtonExchange
    DefaultElectrodeReactionSettings.TRHE = 50[degC]
    DefaultElectrodeReactionSettings.OperationMode = FuelCell
    icph1: ElectrolytePhase (default) | sigmal_mat = userdef; sigmal = sigma_elec
      init1: InitialValues (default) | initphil = 0[V]
      ins1: Insulation (default)
    ecph1: ElectronicConductingPhase (default)
      init1: InitialValues (default) | initphis = 0[V]
      ins1: Insulation (default)
      egnd1: ElectricGround on boundaries 3
      pot1: ElectricPotential on boundaries 10 | phisbnd = E_cell
    h2gasph1: H2GasPhase (default) | xH2O = x_H2O_in
    o2gasph1: O2GasPhase (default) | xH2O = x_H2O_in; xN2 = x_N2_in
    mem1: Membrane on domains 2
    h2gde1: H2GasDiffusionElectrode on domains 1 | sigmas = sigma_electrode; epsl = eps_elec
      h2gder1: H2GasDiffusionElectrodeReaction (default) | i0_ref = i0_anode; ElectrodeKinetics = LinButlerVolmer; Av = AV
    o2gde1: O2GasDiffusionElectrode on domains 3 | sigmas = sigma_electrode; epsl = eps_elec
      o2gder1: O2GasDiffusionElectrodeReaction (default) | i0_ref = i0_cathode; Av = AV

Mesh
  mesh1 "Mesh 1"
    swe1: Sweep "Swept 1" on remaining entities | sourceface = boundaries 10
      dis1: Distribution on domains 3 | type = predefined; reverse = on; elemratio = 5
      size1: Size on no edges | hauto = 1

Studies
  std1 "Study 1"
    clusw: ClusterSweep | pname = E_cell; plistarr = range(1,-0.1,0.5); punit = V; accumtable = tbl9
    stat: Stationary | pname = E_cell; plistarr = range(1,-0.1,0.5); punit = V

Solver configurations
  sol1 "Solution 1" (study std1)
    v1: Variables "Dependent Variables 1"
      comp1_fc_phil: Field "Electrolyte potential (comp1.fc.phil)" | scalemethod = manual; scaleval = 1
      comp1_fc_phis: Field "Electric potential (comp1.fc.phis)" | scalemethod = manual; scaleval = 1
    s1: Stationary "Stationary Solver 1" | stol = 1.0E-4
      fc1: FullyCoupled | linsolver = d1; minstep = 1.0E-6; maxiter = 50
      d1: Direct "Direct (fc)" | linsolver = pardiso
  sol2 "Parametric Solutions 1" (study std1)

Datasets
  dset1: Solution | solution = sol1
  dset3: Solution "Probe Solution 3"
  avh1: Average "Boundary Probe 1" on boundaries 3 | data = dset3
  dset4: Solution | solution = sol2

Derived values
  pev1: EvalPoint "Boundary Probe 1" | data = avh1; table = tbl1; expr = -fc.nIs

Tables
  tbl2: Table "Accumulated Probe Table 2"
    E_cell (V) | -fc.nIs (A/cm^2), Boundary Probe 1
    1 | 0.00967869
    0.9 | 0.0492939
    0.8 | 0.140453
    0.7 | 0.305844
    0.6 | 0.54428
    0.5 | 0.852599
  tbl6: Table "Objective Table 6"
    i0_anode (A/m^2) | Objective
    10000 | 1.36088e-05
    14000 | 1.3731e-05
    6000 | 1.57479e-05
    11783.8 | 1.37324e-05
    10560.3 | 1.36083e-05
    10360.3 | 1.36085e-05
    10466 | 1.36084e-05
    10560.3 | 1.36083e-05
  tbl8: Table "Objective Table 8"
    i0_anode (A/m^2) | Objective
    14000 | 1.3731e-05
    18000 | 1.39079e-05
    10000 | 1.36088e-05
    6000 | 1.57479e-05
    11783.8 | 1.37324e-05
    10560.3 | 1.36083e-05
    10360.3 | 1.36085e-05
    10466 | 1.36084e-05
    10560.3 | 1.36083e-05
  tbl9: Table "Accumulated Probe Table 9"
    E_cell (V) | -fc.nIs (A/cm^2), Boundary Probe 1
    1 | 0.00967869
    0.9 | 0.0492939
    0.8 | 0.140453
    0.7 | 0.305844
    0.6 | 0.54428
    0.5 | 0.852599

Plots
  pg1: PlotGroup3D "Electrode Potential with Respect to Ground (fc)" | data = dset1
    mslc1: Multislice | expr = fc.phis
    arwv1: ArrowVolume | expr = {fc.Isx, fc.Isy, fc.Isz}
      filt1: Filter | expr = isdefined(root.comp1.fc.phis); nodespec = all
  pg2: PlotGroup3D "Electrolyte Potential (fc)" | data = dset1
    mslc1: Multislice | expr = fc.phil
    arwv1: ArrowVolume | expr = {fc.Ilx, fc.Ily, fc.Ilz}
      filt1: Filter | expr = isdefined(fc.phil); nodespec = all
  pg6: PlotGroup1D "Probe Plot Group 6"
    tblp1: Table "Probe Table Graph 1" | table = tbl1
  pg7: PlotGroup3D "Electrode Potential with Respect to Ground (fc) 1" | data = dset4
    mslc1: Multislice | expr = fc.phis
    arwv1: ArrowVolume | expr = {fc.Isx, fc.Isy, fc.Isz}
      filt1: Filter | expr = isdefined(root.comp1.fc.phis); nodespec = all
  pg8: PlotGroup3D "Electrolyte Potential (fc) 1" | data = dset4
    mslc1: Multislice | expr = fc.phil
    arwv1: ArrowVolume | expr = {fc.Ilx, fc.Ily, fc.Ilz}
      filt1: Filter | expr = isdefined(fc.phil); nodespec = all